# OpenSim document version 40000
MarkerSet:
  Marker RASI: pelvis (0.028 0.07392784 0.08034756)
  Marker LASI: pelvis (0.028 0.01 -0.128)
  Marker RPSI: pelvis (-0.154 0.025 0.05)
  Marker LPSI: pelvis (-0.154 0.025 -0.05)
  Marker RKNE: femur_r (0.008 -0.404 0.055)
  Marker RMKN: femur_r (0.011 -0.401 -0.055)
  Marker RANK: tibia_r (-0.02 -0.385 0.053)
  Marker RMED: tibia_r (0.006 -0.38 -0.038)
  Marker RTOE: calcn_r (0.186844 0.00836653 0.00526621)
  Marker RHEE: calcn_r (-0.0321615 0.0325693 -0.0111695)
  Marker LKNE: femur_l (0.008 -0.404 -0.055)
  Marker LMKN: femur_l (0.011 -0.401 0.055)
  Marker LANK: tibia_l (-0.02 -0.385 -0.053)
  Marker LMED: tibia_l (0.006 -0.38 0.038)
  Marker LTOE: calcn_l (0.186844 0.00836653 -0.00526621)
  Marker LHEE: calcn_l (-0.0321615 0.0325693 0.0111695)
  Marker RSHO: torso (0 0.418 0.142)
  Marker LSHO: torso (0 0.418 -0.142)
  Marker C7: torso (-0.08 0.42 0.003)
  Marker RELB: humerus_r (0.015 -0.28 0.04) fixed=true
  Marker RWRA: radius_r (0.0005 -0.225 0.05) fixed=true
  Marker RWRB: radius_r (-0.022 -0.225 -0.022) fixed=true
  Marker LELB: humerus_l (0.015 -0.28 -0.04) fixed=true
  Marker LWRA: radius_l (0.0005 -0.225 -0.05) fixed=true
  Marker LWRB: radius_l (-0.022 -0.225 0.022) fixed=true
  Marker RTHI: femur_r (0.09 -0.15 0.07)
  Marker LTHI: femur_l (0.09 -0.15 -0.07)
  Marker RTIB: tibia_r (0 -0.115 0.07)
  Marker LTIB: tibia_l (0 -0.115 -0.07)
  Marker CLAV: ground (-0.06843872 1.39569 0)
